*Heading
** Job name: Job-1 Model name: Model-1
** Generated by: Abaqus/CAE 2022
*Preprint, echo=NO, model=NO, history=NO, contact=NO
**
** PARTS
**
*Part, name=SLJ
*Node
      1,         145., -0.200000003
      2,         145.,  -2.20000005
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*Element, type=CPE4R
  1,    1,   13, 1149,  318
  2,   13,   14, 1150, 1149
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*Nset, nset="Substrate 1"
    7,    8,    9,   10,   11,   12
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*Elset, elset="Substrate 1"
 1669, 1670, 1671, 1672, 1673, 1674
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*Nset, nset="Substrate 2"
    1,    2,    3,    4,    5,    6
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*Elset, elset="Substrate 2", generate
    1,  1668,     1
*Nset, nset=Adhesive
    1,    5,    7,   11,  319,  320
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*Elset, elset=Adhesive, generate
 2563,  2820,     1
*Nset, nset=Substrates
    1,    2,    3,    4,    5,    6
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*Elset, elset=Substrates
    1,    2,    3,    4,    5,    6
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*Nset, nset="Whole Model", generate
    1,  4036,     1
*Elset, elset="Whole Model", generate
    1,  3594,     1
*Nset, nset="Left Edge"
   9,  10, 733, 734, 735, 736, 737
*Elset, elset="Left Edge", generate
 2557,  2562,     1
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** Section: Substrate 2
*Solid Section, elset="Substrate 2", material="Aluminum 2024 T3 Alcad"
25.,
** Section: Substrate 1
*Solid Section, elset="Substrate 1", material="Aluminum 2024 T3 Alcad"
25.,
** Section: Adhesive
*Solid Section, elset=Adhesive, material="Araldite 2015"
25.,
*End Part
**
**
** ASSEMBLY
**
*Assembly, name=Assembly
**
*Instance, name=SLJ, part=SLJ
*End Instance
**
*End Assembly
**
** MATERIALS
**
*Material, name="Aluminum 2024 T3 Alcad"
*Density
 2.67e-09,
*Elastic
66000., 0.33
*Expansion
 2.32e-05,
*Material, name="Araldite 2015"
*Density
 1.4e-09,
*Elastic
1850., 0.4
*Expansion
 0.00012,
** ----------------------------------------------------------------
**
** STEP: Displacement Step
**
*Step, name="Displacement Step", nlgeom=YES, inc=10000
*Static
0.05, 1., 1e-20, 0.1
**
** BOUNDARY CONDITIONS
**
** Name: BC Disp Type: Displacement/Rotation
*Boundary
SLJ."Right Edge", 1, 1, 2.
SLJ."Right Edge", 2, 2
** Name: BC Fixed Type: Displacement/Rotation
*Boundary
SLJ."Left Edge", 1, 1
SLJ."Left Edge", 2, 2
**
** CONTROLS
**
*Controls, reset
*Controls, parameters=time incrementation
, , , , , , , 20, , ,
**
** OUTPUT REQUESTS
**
*Restart, write, frequency=0
**
** FIELD OUTPUT: F-Output-1
**
*Output, field
*Node Output
U,
*Element Output, directions=YES
LE, PE, PEEQ, PEMAG, S, SDEG
**
** HISTORY OUTPUT: HO-RF
**
*Output, history
*Node Output, nset=SLJ."Left Edge"
RF1,
**
** HISTORY OUTPUT: HO-Disp
**
*Node Output, nset=SLJ."Right Vertex"
U1,
*End Step
